2018-06-12
오전 09:24
$PROBLEM  Parent drug, using ADVAN2
$INPUT ID TIME AMT UVOL DV CMT MDV EVID L2
$DATA ../dextroparent.dat IGNORE=#
$SUBROUTINES ADVAN2 TRANS1
$PK
  K12=THETA(1)
  KA=K12
  MU_1=LOG(THETA(2))
  V2=EXP(MU_1+ETA(1))
  MU_2=LOG(THETA(3))
  CLP=EXP(MU_2+ETA(2)) ; RENAL CL FOR PARENT
  CLB=THETA(4)         ; METABOLIC CL FOR METABOLIC
  K23=CLP/V2+CLB/V2
  K=K23
  F0=CLP/(CLP+CLB)
  S2=V2
  S3=UVOL
$ERROR (EVERY EVENT)
  ACMT=ABS(CMT) ; output compartment may have negative value of CMT
  IF(ACMT.EQ.2) Y=F*(1+EPS(1))
  IF(ACMT.EQ.3) Y=F*(1+EPS(2))
$THETA
  (0.01,0.8,6) ;KA
  (0.01,43,1000);V2
  (0.0001,20,190);CLP
  (0.01,15,90);CLB
$OMEGA
  0.05  0.05
$SIGMA
  .01 .01
  .01 .01 ; eps(3) and eps(4) for consistent EPS with sim_metab_a6 example
$SIM (111111) ONLYSIM
$TABLE ID TIME AMT UVOL DV SIMP=PRED CMT MDV EVID L2 NOAPPEND FILE=sim_parent_a2.tab

NM-TRAN MESSAGES
 WARNINGS AND ERRORS (IF ANY) FOR PROBLEM    1
 (WARNING  2) NM-TRAN INFERS THAT THE DATA ARE POPULATION.
 (WARNING  3) THERE MAY BE AN ERROR IN THE ABBREVIATED CODE. THE FOLLOWING
 ONE OR MORE RANDOM VARIABLES ARE DEFINED WITH "IF" STATEMENTS THAT DO NOT
 PROVIDE DEFINITIONS FOR BOTH THE "THEN" AND "ELSE" CASES. IF ALL
 CONDITIONS FAIL, THE VALUES OF THESE VARIABLES WILL BE ZERO.
   Y
 (WARNING  32) $SIGMA INCLUDES A NON-FIXED INITIAL ESTIMATE CORRESPONDING TO
 AN EPS (OR ERR) THAT IS NOT USED IN ABBREVIATED CODE.

1NONLINEAR MIXED EFFECTS MODEL PROGRAM (NONMEM) VERSION 7.4.1
 ORIGINALLY DEVELOPED BY STUART BEAL, LEWIS SHEINER, AND ALISON BOECKMANN
 CURRENT DEVELOPERS ARE ROBERT BAUER, ICON DEVELOPMENT SOLUTIONS,
 AND ALISON BOECKMANN. IMPLEMENTATION, EFFICIENCY, AND STANDARDIZATION
 PERFORMED BY NOUS INFOSYSTEMS.
 PROBLEM NO.:         1
 Parent drug, using ADVAN2
 TOT. NO. OF OBS RECS:        4
 TOT. NO. OF INDIVIDUALS:        1
 ONE COMPARTMENT MODEL WITH FIRST-ORDER ABSORPTION (ADVAN2)
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 SIMULATION STEP PERFORMED
 Elapsed simulation  time in seconds:     0.01
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 Elapsed finaloutput time in seconds:     0.01
 #CPUT: Total CPU Time in Seconds,        0.062
